# 土壤修复;原位修复;热脱附;施工准备;污染土壤

Dataset: ILCD process, Unit process, single operation
Geography: HEN-CN
Reference year: 2022
Classification: Other Services / Repair and maintenance
Generated by: 张今英, zhangjy@caep.org.cn
Owner: 天工LCI数据工作小组
Review: Dependent internal review by 天工LCI数据工作小组
Amounts: no units in this file; such an amount is in the reference unit of its flow, which a separate flow dataset defines
copyright: false
licenseType: Free of charge for all users and uses

## General comment
案例焦化厂位于我国北方中纬度地带，将苯含量高于40 mg/kg、苯并 [a] 芘含量高于 15 mg/kg 的区域定义为高风险区，并进行原位热脱附修复。修复面积7567㎡，土方量30413m³，施工准备阶段周期约 50 天，包括人员物资准备、场地清理、临时设施施工等工。

## Technical purpose
所描述的工业过程是针对我国北方中纬度地带的焦化厂进行的土壤修复，通过原位热脱附技术针对土壤中苯含量超过40 mg/kg以及苯并[a]芘含量超过15 mg/kg的高风险区域。此过程适合于大规模环境修复项目，尤其适用于7567平方米定义区域内总体积为30413立方米的土壤处理。

## Reference product
- contaminated soil: 30413; measured

## Inputs
All rows: measured
- Electricity: 172800
- Diesel: 9.629
- water: 640
- iron: 27868
- Concrete: 2097
- cement: 300
- Polyethylene: 35
- heavy fuel oil: 4

## Use advice
在使用本数据集进行生命周期评估(LCA)研究时，用户需注意数据的地理特定性（中国北方，中纬度地区）和焦化厂现场的独特条件。定义的高风险区域基于特定的污染物阈值，这应在适当的背景下考虑。施工准备期大约50天的时间，包括人员物资的准备、场地清理和临时设施施工应纳入项目排期。方法学建议：建模反映这些特定条件的场景，以便更准确的影响评估。

## Review details
清单： 内部审查通过几个迭代步骤完成，涉及原始数据验证、原始数据记录、代表性、完整性、与 ISO 14040 和 14044 有关的建模的一致性。

## Data sources
- 刘文晓等.基于修复效果的污染土壤修复工程环境足迹分析[J].环境科学研究 35,2367-2377（2022）.
