# 土壤和地下水修复;原位;地下水抽出处理;施工;抽水井施工

Dataset: ILCD process, Unit process, single operation
Geography: CA
Reference year: 2007
Classification: Other Services / Repair and maintenance
Generated by: 王宁, wang_ning@caep.org.cn
Owner: 天工LCI数据工作小组
Review: Dependent internal review by 天工LCI数据工作小组
Amounts: no units in this file; such an amount is in the reference unit of its flow, which a separate flow dataset defines
licenseType: Free of charge for all users and uses

## General comment
使用聚氯乙烯、云母砂和钢材建造3个抽水井

## Geography
The contaminated area was located 600 m from a river shore in the northern part of the prov-ince of Quebec， Canada.

## Technical purpose
该数据集涉及为土壤和地下水修复而建造的抽水井的过程，特别是涉及使用抽取和处理方法来提取和净化被污染地下水的操作。建造过程中使用了聚氯乙烯（PVC）、云母砂和钢材等材料。这种修复过程适用于环境清洁和污染控制，在敏感水体附近的污染场所尤其如此，例如提及的情况，位于加拿大魁北克省北部河岸600米处。

## Reference product
- Extraction wel: 3; article inperiodical
  在现场建造三个抽提井

## Inputs
All rows: article inperiodical
- Polyvinyl chloride: 459.1
  成井过程消耗的PVC管
- Diesel: 2.5
  钻孔过程钻机所消耗的柴油
- quartz sand: 1036
  成井过程消耗的石英砂
- bentonite: 843.4
  成井过程消耗的石膨润土
- cement: 210.1
  成井过程消耗的水泥

## Use advice
在使用此数据集进行土壤和地下水修复项目的生命周期评估时，应注意与相关地区的方法论一致性。用户必须根据当地环境法规和条件考虑技术的适用性。建议考虑材料供应和施工实践的潜在差异，这些差异可能与魁北克省北部的情况不同，例如材料的可用性或不同的土壤和地下水污染物的存在。此外，必须相对于使用的具体情况考虑材料开采、运输和井建造的环境影响。

## Review details
清单： 内部审查通过几个迭代步骤完成，涉及原始数据验证、原始数据记录、代表性、完整性、与 ISO 14040 和 14044 有关的建模的一致性。
