# 土壤和地下水修复;原位;地下水抽出处理;施工;运输

Dataset: ILCD process, Unit process, single operation
Geography: CA
Reference year: 2007
Classification: Other Services / Repair and maintenance
Generated by: 王宁, wang_ning@caep.org.cn
Owner: 天工LCI数据工作小组
Review: Dependent internal review by 天工LCI数据工作小组
Amounts: no units in this file; such an amount is in the reference unit of its flow, which a separate flow dataset defines
licenseType: Free of charge for all users and uses

## General comment
将所需材料和设备运至现场

## Geography
The contaminated area was located 600 m from a river shore in the northern part of the prov-ince of Quebec， Canada.

## Technical purpose
描述的过程主要用于土壤和地下水的修复。它特别用于外部治疗受污染地下水的泵处理方法。除了修复活动外，它还涉及运输和建设活动，以在污染现场建立治疗所需的基础设施。此过程适用于环境工程学，特别是用于管理和恢复污染站点，以防止污染物的传播并保护附近的生态系统，例如河岸。

## Reference product
- Equipment and Materials Arriving on Site: 1; article inperiodical
  到达现场的设备和材料

## Inputs
- Diesel: 79.8; article inperiodical
  将所需材料和设备运至现场所需要的柴油

## Use advice
在使用此数据集时，必须小心确保它适用于正在修复的站点的具体条件。考虑到水体的接近，例如所提到的河流和其他生态敏感性。数据的用户还应该意识到外部修复方法的局限性，并评估鉴于当地的地质和水文地质条件，此方法是否合适。如果数据集用于比较目的，应确保其他比较场景在范围上是等效的，并且所有相关参数，例如运输距离和施工影响，都已适当包括并校准。

## Review details
清单： 内部审查通过几个迭代步骤完成，涉及原始数据验证、原始数据记录、代表性、完整性、与 ISO 14040 和 14044 有关的建模的一致性。
