# 土壤修复;异位修复;热脱附修复;工程实施;尾气处理

Dataset: ILCD process, Unit process, single operation
Geography: SH-CN
Classification: Other Services / Repair and maintenance
Generated by: 王枫, wangfeng@caep.org.cn
Owner: 天工LCI数据工作小组
Review: Dependent internal review by 天工LCI数据工作小组
Amounts: no units in this file; such an amount is in the reference unit of its flow, which a separate flow dataset defines
copyright: false
licenseType: Free of charge for all users and uses

## General comment
异位热脱附修复1立方米污染土，热脱附后的废气经过旋风除尘器、二次燃烧室、热交换器、急冷塔、布袋除尘 器和喷淋吸收洗涤塔后达标排放，尾气处理过程除电力和水的投入外，还需要活性炭和氢氧化钠 (NaOH) 碱性溶液吸收尾气

## Geography
我国华东区域5 个污染土壤异位热脱附修复工程案例

## Technology and included processes
热脱附后的废气经过旋风除尘器、二次燃烧室、热交换器、急冷塔、布袋除尘器和喷淋吸收洗涤塔后达标排放

## Technical purpose
本描述的热脱附处理工艺是针对一立方米污染土壤的土壤异位修复。此工业应用作为一种修复解决方案，在中国华东地区的不同受污染土地上广泛使用。该过程包括旋风除尘器、二次燃烧室、热交换器、急冷塔、布袋除尘器和喷淋吸收洗涤塔的使用，以确保经处理后的尾气达到排放标准。

## Reference product
- Treated exhaust gas: 1; measured

## Inputs
- Electricity: 9; measured
- Activated Carbon: 0.98; measured
- Sodium hydroxide: 50; measured
- Water (fresh water): 200; measured

## Outputs
- Water: 5000; measured

## Use advice
使用这些数据的用户在进行生命周期评估时必须考虑完整的排放处理链，并计算所有输入，例如电力和水的使用。在废气吸收阶段，应注意包括活性炭和氢氧化钠（NaOH）碱性溶液的消耗。此数据集专为中国华东地区的土壤修复项目案例量身定制，当应用于不同的环境或地理位置时可能需要调整。

## Review details
清单： 内部审查通过几个迭代步骤完成，涉及原始数据验证、原始数据记录、代表性、完整性、与 ISO 14040 和 14044 有关的建模的一致性。

## Data sources
- 刘爽,陈盼,宋慧敏等.我国华东地区污染土壤异位热脱附修复碳排放及减排策略[J].环境工程学报,2022,16(08):2663-2671.
