# 湿蒸法棉布染整加工|印染棉布|污水处理

Dataset: ILCD process, Unit process, single operation
Geography: SZ-JS-CN
Reference year: 2012
Classification: Materials production / Other mineralic materials
Generated by: 段颖凡, 1300925579@qq.com
Review: Dependent internal review by 天工LCI数据工作小组
Amounts: no units in this file; such an amount is in the reference unit of its flow, which a separate flow dataset defines
copyright: false

## Geography
本研究选取江苏省某印染企业为重点调研对象，该企业位于长三角经济圈中的常熟。

## Inputs
- Electricity: 1330; measured
- Crude coal: 1560; calculated
- Fuel Oil: 33.3
- heavy fuel oil: 10
- diesel: 45.8
- Coke Oven Gas: 61.1
- natural gas: 0.782
- Water (fresh water): 20.7; measured

## Outputs
- carbon dioxide: 420; calculated
- carbon monoxide: 1.02
- sulfur dioxide: 0.38; estimated
- Nitrogen oxides: 1.92
- Dust (unspecified, from stack): 3.51; estimated
- chemical oxygen demand: -212; measured
- Suspended solids, unspecified: -13.7; measured
- lead: 3.41e-5
- mercury: 7.16e-7
- fluorine: 6.44e-6
- cadmium: 1.26e-6
- arsenic: 2.92e-5

## Review details
清单： 内部审查通过几个迭代步骤完成，涉及原始数据验证、原始数据记录、代表性、完整性、与 ISO 14040 和 14044 有关的建模的一致性。

## Data sources
- 朱亚楠. 棉布连续轧染工艺生命周期环境影响评价. (南京大学, 2012).
