# 土壤修复;异位修复;热脱附修复;工程实施;土壤预处理

Dataset: ILCD process, Unit process, single operation
Geography: SH-CN
Classification: Other Services / Repair and maintenance
Generated by: 王枫, wangfeng@caep.org.cn
Owner: 天工LCI数据工作小组
Review: Dependent internal review by 天工LCI数据工作小组
Amounts: no units in this file; such an amount is in the reference unit of its flow, which a separate flow dataset defines
copyright: false
licenseType: Free of charge for all users and uses

## General comment
异位热脱附修复1立方米污染土，为防止气味逸散和二次污染，污染土壤需要在PVDF 膜材质的负压大棚内进行破 碎、筛分、含水率调节等预处理工序

## Geography
我国华东区域5 个污染土壤异位热脱附修复工程案例

## Technology and included processes
为防止气味逸散和二次污染，污染土壤需要在PVDF 膜材质的负压大棚内进行破碎、筛分、含水率调节等预处理工序

## Technical purpose
土壤修复使用异位热脱附技术处理受重金属、烃类或其他污染物污染的土壤，主要用于大规模环境修复项目。处理过程中，1立方米污染土壤在PVDF膜材料制成的负压大棚内进行破碎、筛分、含水率调整等预处理操作，以防止气味逸散和二次污染。

## Reference product
- Pre-treatment Soil: 1

## Inputs
All rows: measured
- Oils, unspecified: 0.00075
- Limestone: 6
- Steel sections: 0.13
- Polyethylene: 0.0012
- lightweight concrete block: 0.0054
- electricity from hydroelectric power plant: 9.07

## Outputs
- Waste (solid): 50; measured

## Use advice
生命周期评估数据使用者应考虑PVDF膜材质生产和维护负压大棚所产生的环境影响，以及预处理和热脱附过程中的能源消耗。必须考虑污染水平和法规的地区差异——此数据集关联于我国华东区域五个污染土壤异位热脱附修复工程案例。此外，在生命周期分析中还应纳入运输至处理设施的具体因素以及热脱附能源来源的原产地。

## Review details
清单： 内部审查通过几个迭代步骤完成，涉及原始数据验证、原始数据记录、代表性、完整性、与 ISO 14040 和 14044 有关的建模的一致性。

## Data sources
- 刘爽,陈盼,宋慧敏等.我国华东地区污染土壤异位热脱附修复碳排放及减排策略[J].环境工程学报,2022,16(08):2663-2671.
