# 干法制砂|砂石粗碎|颚式破碎技术

Dataset: ILCD process, Unit process, single operation
Geography: HAIN-CN
Reference year: 2020
Classification: Materials production / Other mineralic materials
Generated by: 崔航, Cuihang0716@163.com
Review: Dependent internal review by Tiangong LCI Data Working Group
Amounts: no units in this file; such an amount is in the reference unit of its flow, which a separate flow dataset defines
copyright: false

## General comment
一次破碎（颚式破碎）和筛分

## Technology and included processes
先给料，然后颚式破碎机破碎，破碎后进入振动筛筛分，得到的碎石通过输送带进入成品堆场。其他部分筛后通过输送带送至圆锥破碎机（二次破碎）

## Reference product
- gravel: 41870; measured

## Inputs
- gravel: 51370; measured
- electricity mix: 396; measured

## Outputs
- sand: 8373; measured
  经粗碎后产生的碎石
- Sludge: 790; measured
- particles (> PM10): 4; measured

## Data selection and combination
干法制砂的工艺过程及清单数据来自于该项目提供的经验数据

## Review details
Inventory: The internal review was done by several iteration steps concerning raw data validation, raw data documentation, representativity, completeness and consistency of modelling with regard to ISO 14040 and 14044.; Documentation: The review of the documentation was performed by Ecobilan and is in compliance with ISO 14040 and 14044. The data set documentation is correct in view of the appropriateness of the information provided. It includes all relevant information in view of data quality and scope of application of the respective LCI result.

## Data sources
- 陵水海岛混凝土有限公司干法制砂项目
