# 再生纸生产|瓦楞原纸

Dataset: ILCD process, Unit process, single operation
Classification: Materials production / Other mineralic materials
LCI method principle: Attributional
Generated by: 高逸翔, 22210740040@m.fudan.edu.cn
Review: Dependent internal review by 天工LCI数据工作小组
Amounts: no units in this file; such an amount is in the reference unit of its flow, which a separate flow dataset defines
copyright: false

## Reference product
- Corrugated Cardboard: 1000; measured
  瓦楞原纸

## Inputs
All rows: measured
- Waste paper: 1099
  废纸（制浆阶段）
- water: 0.79
  水（制浆阶段）
- Electricity: 335.16
  电力（制浆阶段）
- hard coal: 351.12
  煤（抄纸阶段）
- water: 5.05
  水（抄纸阶段）
- Electricity: 564.84
  电力（抄纸阶段）
- Diesel: 27.92
  柴油（运输阶段）
- Polymeric ferric sulfate: 0.007
  聚合硫酸铁（废水处理阶段）
- water: 0.79
  水（废水处理阶段）
- Electricity: 6.192
  电力（废水处理阶段）

## Outputs
- carbon dioxide: 398.96; measured
  CO2（制浆阶段）
- Nitrogen oxides: 0.06; measured
  NOx（制浆阶段）
- sulfur dioxide: 0.04; measured
  SO2（制浆阶段）
- methane: 0.05; measured
  CH4（制浆阶段）
- carbon monoxide: 0.74; measured
  CO（制浆阶段）
- non-methane volatile organic compounds: 0.19; measured
  NMVOC（制浆阶段）
- Total Suspended Particulate: 0.7; measured
  TSP（制浆阶段）
- chemical oxygen demand: 0.191; measured
  CODcr（制浆阶段）
- biological oxygen demand: 0.037; measured
  BOD5（制浆阶段）
- total suspended solids, unspecified: 0.12; measured
  TSS（制浆阶段）
- Waste solid: 189.17; measured
  固体废弃物（制浆阶段）
- hazardous waste (unspecified): 0.015; measured
  危险废物（制浆阶段）
- carbon dioxide: 660.16; measured
  CO2（抄纸阶段）
- Nitrogen oxides: 0.09; measured
  NOx（抄纸阶段）
- sulfur dioxide: 0.037; measured
  SO2（抄纸阶段）
- methane: 0.009; measured
  CH4（抄纸阶段）
- carbon monoxide: 1.2; measured
  CO（抄纸阶段）
- non-methane volatile organic compounds: 0.32; measured
  NMVOC（抄纸阶段）
- Total Suspended Particulate: 0.64; measured
  TSP（抄纸阶段）
- chemical oxygen demand: 0.008; measured
  CODcr（抄纸阶段）
- biological oxygen demand: 0.002; measured
  BOD5（抄纸阶段）
- total suspended solids, unspecified: 0.008; measured
  TSS（抄纸阶段）
- hazardous waste (unspecified): 0.02; measured
  危险废物（抄纸阶段）
- carbon dioxide: 55.93; software or database
  CO2（运输阶段）
- sulfur dioxide: 0.003; software or database
  SO2（运输阶段）
- methane: 0.15; software or database
  CH4（运输阶段）
- carbon monoxide: 0.16; software or database
  CO（运输阶段）
- water: 0.42; software or database
  水（化学品生产）
- Electricity: 30.42; software or database
  电力（化学品生产）
- carbon dioxide: 90.78; software or database
  CO2（化学品生产）
- carbon dioxide: 7.39; measured
  CO2（废水处理阶段）
- sulfur dioxide: 0.001; measured
  SO2（废水处理阶段）
- methane: 0.001; measured
  CH4（废水处理阶段）
- carbon monoxide: 0.01; measured
  CO（废水处理阶段）
- Total Suspended Particulate: 0.02; measured
  TSP（废水处理阶段）
- nitrogen, total (excluding N2): 0.024; measured
  TN（废水处理阶段）
- phosphorus, total: 0.006; measured
  TP（废水处理阶段）
- Waste solid: 68.79; measured
  固体废弃物（废水处理阶段）

## Other exchanges
- Nitrogen oxides: 0.01; software or database
  NOx（运输阶段）
- non-methane volatile organic compounds: 0.02; software or database
  PM10（运输阶段）
- Total Suspended Particulate: 0.06; software or database
  NMVOC（运输阶段）
- Diesel: 15.08; software or database
  柴油（化学品生产）
- Nitrogen oxides: 0.01; software or database
  NOx（化学品生产）
- sulfur dioxide: 0.003; software or database
  SO2（化学品生产）
- methane: 0.13; software or database
  CH4（化学品生产）
- carbon monoxide: 0.04; software or database
  CO（化学品生产）
- particles (PM10): 0.01; software or database
  PM10（化学品生产）
- non-methane volatile organic compounds: 0.08; software or database
  NMVOC（化学品生产）
- Total Suspended Particulate: 0.01; software or database
  TSP（化学品生产）
- chemical oxygen demand: 0.053; software or database
  CODcr（化学品生产）
- biological oxygen demand: 0.12; software or database
  BOD5（化学品生产）
- nitrogen, total (excluding N2): 0.09; software or database
  TN（化学品生产）
- nitrate; software or database
  硝酸根（化学品生产阶段）
- phosphate; software or database
  磷酸根（化学品生产阶段）
- total suspended solids, unspecified; software or database
  TSS（化学品生产）
- non-methane volatile organic compounds: 0.01
  NMVOC（废水处理阶段）

## Review details
清单： 内部审查通过几个迭代步骤完成，涉及原始数据验证、原始数据记录、代表性、完整性、与 ISO 14040 和 14044 有关的建模的一致性。

## Data sources
- 赵国杰, 游亚杰, & 黄起帅. 基于生命周期评价的瓦楞原纸产品碳足迹评价. 中国造纸 40, 40–44 (2021).
