# 电力生产 ; 火电 ; 海南

Dataset: ILCD process, Unit process, single operation
Geography: HAIN-CN
Reference year: 2019
Classification: Unit processes / Energy carriers and technologies / Electricity
Generated by: 熊若熙, xiongrx0126@163.com
Owner: 天工LCI数据工作小组
Review: Dependent internal review by 天工LCI数据工作小组
Amounts: no units in this file; such an amount is in the reference unit of its flow, which a separate flow dataset defines
copyright: false
licenseType: Free of charge for all users and uses

## General comment
火电发电包括原煤、洗煤、石油、天然气等十七种化石燃料。该过程只考虑直接发电过程，不考虑上游原材料开采加工和下游消费

## Time period
根据2019年能源统计年鉴数据计算

## Technical purpose
本数据集代表海南地区使用火电进行的电力生成过程。它包括利用原煤、洗煤、石油和天然气等十七种化石燃料仅用于直接发电的情况。该数据对于了解火力发电厂的能源生产具有意义，并可用于能源行业内的规划、分析和优化。

## Reference product
- electricity for thermal power: 3.6; calculated

## Inputs
- Raw coal: 0.393387; calculated
- Diesel: 1.412e-5; calculated
- natural gas: 0.013744; calculated

## Outputs
- carbon dioxide (fossil): 0.753413; calculated
- sulfur dioxide: 0.000126466; calculated
- Nitrogen oxides: 0.00019944; calculated
- particles (> PM10): 2.4185e-5; calculated

## Data treatment and extrapolations
核算方法参考《企业温室气体排放核算方法与报告指南 发电设施》。不同形式发电量及燃料用量来自于《中国能源统计年鉴 2020》中的第三章（能源生产） 和第六章（地区能源平衡表）。用于计算二氧化碳排放因子的低位发热量、单位热值含碳量等燃料参数来自于《2019 年度中国区域电网二氧化碳基准线排放因子 OM 计算说明》、《企业温室气体排放核算方法与报告指南 发电设施》

## Use advice
使用此数据集的用户应参考《企业温室气体排放核算方法与报告指南 发电设施》以确定适当的核算方法。数据集基于《2019年能源统计年鉴》的信息计算而成，具体包括能源生产统计数据和地区能源平衡表。进行二氧化碳排放计算所用的参数，如低位发热值以及单位热值含碳量，应来源于《2019年度中国区域电网二氧化碳基准线排放因子OM计算说明》及相关企业温室气体指南。用户在使用此数据时，不应考虑上游原材料开采加工或下游消费，仅用于分析直接发电的影响。

## Review details
清单： 内部审查通过几个迭代步骤完成，涉及原始数据验证、原始数据记录、代表性、完整性、与 ISO 14040 和 14044 有关的建模的一致性。

## Data sources
- 熊若熙. 中国电力生产和消费二氧化碳与污染物排放因子核算. (清华大学, 2023).
