# 土壤修复;原位修复;热脱附;工程实施;修复后土壤

Dataset: ILCD process, Unit process, single operation
Geography: HEN-CN
Reference year: 2022
Classification: Other Services / Repair and maintenance
Generated by: 张今英, zhangjy@caep.org.cn
Owner: 天工LCI数据工作小组
Review: Dependent internal review by 天工LCI数据工作小组
Amounts: no units in this file; such an amount is in the reference unit of its flow, which a separate flow dataset defines
copyright: false
licenseType: Free of charge for all users and uses

## General comment
高风险区施工运行周期约为 200 天，分为两部分：①热脱附，包括加热、抽提井施工、热脱附设备安装及加热脱附等工作；

## Technical purpose
该土壤修复工艺，特指原位热脱附法，旨在清洁高风险区域内的污染土壤。整个过程约为200天，分为两个主要部分：①热脱附，包括加热、抽提井施工、热脱附设备安装以及加热脱附操作作为单元过程（单一操作）。

## Reference product
- Remediated soil: 30413; measured

## Inputs
All rows: measured
- Natural gas, at consumer EU-27: 766514
- Electricity: 1.296e6
- Diesel: 38.806
- water: 115
- iron: 310265
- Concrete: 2270
- cement: 1513
- heavy fuel oil: 6.162

## Use advice
使用这个生命周期评估数据集时，用户应考虑修复现场的具体条件，如土壤成分和污染水平。需了解热脱附工艺的有效性和环境影响可能因这些条件而异。此外，数据的边界条件应包括整个操作周期，并假设生命周期结束阶段包括恢复阶段，以便修复后将场地恢复到自然状态或预定状态。

## Review details
清单： 内部审查通过几个迭代步骤完成，涉及原始数据验证、原始数据记录、代表性、完整性、与 ISO 14040 和 14044 有关的建模的一致性。

## Data sources
- 刘文晓等.基于修复效果的污染土壤修复工程环境足迹分析[J].环境科学研究 35,2367-2377（2022）.
