# 土壤和地下水修复;原位;地下水抽出处理;地下水得到修复

Dataset: ILCD process, Unit process, single operation
Geography: CA
Reference year: 2007
Classification: Other Services / Repair and maintenance
Generated by: 王宁, wang_ning@caep.org.cn
Owner: 天工LCI数据工作小组
Review: Dependent internal review by 天工LCI数据工作小组
Amounts: no units in this file; such an amount is in the reference unit of its flow, which a separate flow dataset defines
copyright: false
licenseType: Free of charge for all users and uses

## General comment
消耗电力使抽提井和废水处置设施运行，地下水得到修复

## Geography
The contaminated area was located 600 m from a river shore in the northern part of the prov-ince of Quebec， Canada.

## Technology and included processes
使用电力驱动地下水抽出处理系统，使受污染的地下水得到修复

## Technical purpose
这个描述的工业过程旨在修复受污染的土壤和地下水。该土壤和地下水抽取及处理系统在场外进行，以抽取、处理和清洁污染地下水。该过程专门用于地下水受污染的环境修复项目。它适用于修复地点靠近敏感区域的情景，例如距河岸600米的场所，类似于描述中提到的加拿大魁北克省北部的场地。

## Reference product
- Remediated groundwater: 4.2705e6; estimated
  得到修复的地下水

## Inputs
- Electricity: 6.701e7; estimated
  消耗电力是抽出-处理系统运行
- contaminated groundwater: 4.2705e6; estimated
  受污染的地下水

## Use advice
使用此数据集的用户在将此过程作为生命周期评估研究的一部分时，应考虑与所描述场地相似的地理特性和环境条件。重要的是要核算抽提井和废水处置系统的电力消耗，因为它对修复的整体环境影响有显著贡献。任何电力来源的变化或差异（例如，电网组合、可再生资源）都应在生命周期评估中反映出来以确保准确性。此外，用户应考虑与敏感区域（例如，水体）的距离，因为这可能需要额外的保护措施或影响治疗的有效性。

## Review details
清单： 内部审查通过几个迭代步骤完成，涉及原始数据验证、原始数据记录、代表性、完整性、与 ISO 14040 和 14044 有关的建模的一致性。
