# 木浆造纸;复印纸

Dataset: ILCD process, Unit process, black box
Geography: SD-CN
Classification: Materials production / Paper and cardboards
Functional unit: 1t of copy paper.
LCI method principle: Attributional
Generated by: 高逸翔, 22210740040@m.fudan.edu.cn
Owner: 天工LCI数据工作小组
Review: Dependent internal review by 天工LCI数据工作小组
Amounts: no units in this file; such an amount is in the reference unit of its flow, which a separate flow dataset defines
copyright: false
licenseType: Free of charge for all users and uses

## General comment
进行木浆生产复印纸生命周期评价研究的目的是为了量化木浆生产 1t 复印纸背后产生的资源消耗和环境影响，工艺过程分为制浆、抄纸、运输、三废处理四部分。

## Technical purpose
木浆纸生产数据集用于量化1吨复印纸生产所涉及的资源消耗与环境影响。该数据对于进行生命周期评价研究尤为重要，包括的主要工艺环节有制浆、抄纸、运输和三废处理。在山东省的造纸产业中，采用木浆工艺生产的复印纸所占比重重要，且由于复印纸对硬度和亮度的高要求，此种生产工艺被视为更具典型性和代表性。

## Reference product
- copy paper: 1000; measured
  复印纸

## Inputs
All rows: measured
- hard coal: 6.17, 308.7 (2 entries)
  煤（制浆阶段）
- natural gas: 18.4
  天然气（制浆阶段）
- water: 26.54, 1.57 (2 entries)
  水（制浆阶段）
- Fuel Oil: 80.33
  油（制浆阶段）
- Wood: 1381.72
  林木（制浆阶段）
- sodium hydroxide: 18
  氢氧化钠（制浆阶段）
- Chlorine Dioxide: 10
  ClO2（制浆阶段）
- hydrogen peroxide: 6, 78 (2 entries)
  双氧水（制浆阶段）
- Sodium sulfide: 1
  硫化钠（制浆阶段）
- sulfuric acid: 12
  硫酸（制浆阶段）
- hard coal: 458.13
  煤（抄纸阶段）
- water: 6.78
  水（抄纸阶段）
- Fuel Oil: 1.25
  油（抄纸阶段）
- Starch: 48
  淀粉（抄纸阶段）
- Filler Material: 23
  填料（抄纸阶段）
- Alkyl Ketene Dimer: 12
  AKD（抄纸阶段）
- Optical Brightening Agent: 8
  增白剂（抄纸阶段）
- Fuel Oil: 24.52
  油（运输阶段）
- hard coal: 2.92
  煤（三废处理）
- water: 0.29
  水（三废处理）
- Electricity: 1425.6
  电力（制浆阶段）
- Waste paper: 1323
  废纸（制浆阶段）
- Sodium silicate: 34
  硅酸钠（制浆阶段）
- sodium hydroxide: 49
  火碱（制浆阶段）
- Saponifier: 3
  皂化剂（制浆阶段）

## Outputs
All rows: measured
- carbon dioxide: 300, 979 (2 entries)
  CO2（制浆阶段）
- Nitrogen oxides: 1.02, 10.5 (2 entries)
  NOx（制浆阶段）
- sulfur dioxide: 2.27, 6.87 (2 entries)
  SO2（制浆阶段）
- methane: 0.0166
  CH4（制浆阶段）
- carbon monoxide: 3.95
  CO（制浆阶段）
- Total Suspended Particulate: 0.0386
  颗粒物（制浆阶段）
- chemical oxygen demand: 9.45
  COD（制浆阶段）
- biological oxygen demand: 1.01
  BOD5（制浆阶段）
- Adsorbable Organic Halide: 0.062
  AOX（制浆阶段）
- nitrogen, total (excluding N2): 0.15
  TN（制浆阶段）
- phosphorus, total: 0.0147
  TP（制浆阶段）
- nitrate: 0.00966
  NO3-（制浆阶段）
- Total Suspended Particulate: 0.9
  TSP（制浆阶段）
- Waste solid: 42.9
  固体废物（制浆阶段）
- hazardous waste (unspecified): 0.075
  危险废物（制浆阶段）
- carbon dioxide: 0.0893
  CO2（抄纸阶段）
- Nitrogen oxides: 6.47
  NOx（抄纸阶段）
- sulfur dioxide: 8.37
  SO2（抄纸阶段）
- methane: 0.00435
  CH4（抄纸阶段）
- carbon monoxide: 20
  CO（抄纸阶段）
- Total Suspended Particulate: 0.285
  颗粒物（抄纸阶段）
- nitrate: 0.0109
  NO3-（抄纸阶段）
- Waste solid: 5.78
  固体废物（抄纸阶段）
- hazardous waste (unspecified): 0.11
  危险废物（抄纸阶段）
- carbon dioxide: 893
  CO2（运输阶段）
- Nitrogen oxides: 0.153
  NOx（运输阶段）
- sulfur dioxide: 0.203
  SO2（运输阶段）
- methane: 0.00099
  CH4（运输阶段）
- carbon monoxide: 0.153
  CO（运输阶段）
- Total Suspended Particulate: 0.0359
  颗粒物（运输阶段）
- carbon dioxide: 5.66
  CO2（三废处理）
- Nitrogen oxides: 0.0412
  NOx（三废处理）
- sulfur dioxide: 0.0531
  SO2（三废处理）
- methane: 2.77e-5
  CH4（三废处理）
- carbon monoxide: 0.127
  CO（三废处理）
- Total Suspended Particulate: 0.00182
  颗粒物（三废处理）
- chemical oxygen demand: 0.14
  COD（三废处理）
- biological oxygen demand: 0.022
  BOD5（三废处理）
- nitrogen, total (excluding N2): 0.00956
  TN（三废处理）
- phosphorus, total: 0.0011
  TP（三废处理）
- Total Suspended Particulate: 0.0601
  TSP（三废处理）

## Data selection and combination
本文的数据来源一方面是深入山东省主要造纸企业进行实地调研获取第一 手资料，另一方面是查阅山东主要造纸企业年度报表、中国造纸年鉴和中国造纸 协会年报以及相关的文献资料等手段来获得。

## Use advice
使用该数据集进行木浆纸生产生命周期评价时，应详细考虑制浆和造纸过程中所有化学品，无论它们的用量大小。虽然标准的截流原则通常是考虑质量超过1%的化学品，但此数据集包含所有可获得的化学数据，即使是那些使用量小但对环境有重大影响的物质。这种方法最大限度地减少了误差，提供了一个更全面的过程视角。建议用户核实数据的相关性和时效性，特别是鉴于生产过程和环境因素的潜在变化。应考虑任何生产方法或环保法规的更新。

## Review details
清单： 内部审查通过几个迭代步骤完成，涉及原始数据验证、原始数据记录、代表性、完整性、与 ISO 14040 和 14044 有关的建模的一致性。

## Data sources
- 葛振香. 基于LCA的山东省造纸业可持续发展研究. (山东师范大学, 2017).
