# 砖块生产 |页岩空心砖生产 |焙烧工艺

Dataset: ILCD process, Unit process, single operation
Geography: GZ-JX-CN
Reference year: 2020
Classification: Materials production / Other mineralic materials
Generated by: 王湘锦, r99rt4@163.com
Review: Dependent internal review by Tiangong LCI Data Working Group
Amounts: no units in this file; such an amount is in the reference unit of its flow, which a separate flow dataset defines
copyright: false

## Reference product
- shale hollow brick: 1000; measured

## Inputs
- brickbat aggregate: 1450; measured
- electricity mix: 14.9472; measured
- Water (fresh water): 0.02136; measured

## Outputs
All rows: measured
- fluorine: 0.022
- particles (> PM10): 0.218
- sulfur dioxide: 0.997
- Waste (solid): 49.85
- nitrogen monoxide: 0.111

## Deviations from the LCI method approaches
The EIA report is based on the annual production of bricks (80 million bricks) as a whole, and for statistical purposes, the data has been converted according to the size specifications described therein, in terms of bricks produced per tonne of production

## Data selection and combination
采用根据《第一次全国污染源普查工业污染源产排污系数手册 第七分册》中 3131 烧结类砖瓦及建筑砌块制造业产排污系数表的相关数据。

## Sampling procedure
该环评报告的数据来源于工厂的实时数据

## Review details
Inventory: The internal review was done by several iteration steps concerning raw data validation, raw data documentation, representativity, completeness and consistency of modelling with regard to ISO 14040 and 14044.; Documentation: The review of the documentation was performed by Ecobilan and is in compliance with ISO 14040 and 14044. The data set documentation is correct in view of the appropriateness of the information provided. It includes all relevant information in view of data quality and scope of application of the respective LCI result.

## Data sources
- 年产 8000 万块页岩标砖项目环评报告公示
