# 铝粉生产;铝粉;切割、脱干、粉碎

Dataset: ILCD process
Geography: CN
Classification: Unit processes / Materials production / Metals and semimetals
Generated by: 陆嘉麒, wilsherelu@foxmail.com
Owner: 天工LCI数据工作小组
Review: Dependent internal review by 天工LCI数据工作小组
Amounts: no units in this file; such an amount is in the reference unit of its flow, which a separate flow dataset defines
copyright: false
licenseType: Free of charge for all users and uses

## General comment
该工艺生产的铝粉通常用于需要轻质金属、高导热性和耐腐蚀性的应用中。常见的用途包括在油漆和颜料、烟火、航空航天部件，以及作为塑料和轻质混凝土的颜色素。

## Reference product
- Powdered Aluminium: 1000; missing unimportant
  铝粉产品

## Inputs
- aluminium: 1470; missing unimportant
  铝原料
- light fuel oil: 0.000647; missing unimportant
  机油（设备消耗）
- Electricity: 36.108; missing unimportant
- water: 450; missing unimportant

## Outputs
- sulfur dioxide: 0.00118; missing unimportant
  二氧化硫[排放到大气（未指定类型）]
- Particles (PM0.2 - PM2.5): 0.288; missing unimportant
  总颗粒物[排放到大气（未指定类型）]
- municipal solid waste deposition: 0.642; missing unimportant
  生活垃圾
- waste water - untreated: 50; missing unimportant
  生活废水

## Use advice
在使用此LCA数据时，必须考虑铝粉生产过程中的所有相关环境影响，包括能源消耗和排放。应考虑回收和产品生命周期终端场景。如果铝粉用于寿命周期长的产品，应在生命周期评估中考虑其生命周期终端的回收潜力。

## Review details
清单： 内部审查通过几个迭代步骤完成，涉及原始数据验证、原始数据记录、代表性、完整性、与 ISO 14040 和 14044 有关的建模的一致性。

## Data sources
- 垣曲金华铝粉加工环评报告
