# 煤炭洗选|将煤炭、矸石、精煤洗选分离

Dataset: ILCD process, Unit process, black box
Geography: SQ-HEN-CN
Reference year: 2015
Classification: Materials production / Other mineralic materials
Generated by: 尹琳琳, yinlinlin0623@163.com
Review: Dependent internal review by Tiangong LCI Data Working Group
Amounts: no units in this file; such an amount is in the reference unit of its flow, which a separate flow dataset defines

## Geography
永城矿区的资源储量和储采比例与省内其他矿区相比具有较高的优势，现共划分 5 个勘探煤矿区、 2 个找煤预测区，永城矿区煤层的赋存较为稳定，开采技术条件也相对简单，可采煤层的倾角 比较平缓，适于机械化开采方式。

## Technology and included processes
煤炭洗选加工过程中包括原煤准备、原煤分选、洗选后的干燥以及脱水和煤 泥水的处理等环节。

## Inputs
- Diesel: 25830; uniform; article inperiodical
  2013年新桥煤矿洗煤厂煤炭洗选过程中“柴油”消耗活动水平数据。
- Gasoline (regular): 28190; uniform; article inperiodical
  2013年新桥煤矿洗煤厂煤炭洗选过程中“汽油”消耗活动水平数据。
- Electricity: 7.24872e7; uniform; article inperiodical
  2013年新桥煤矿洗煤厂煤炭洗选过程中“电”消耗活动水平数据。
- water: 573215; uniform; article inperiodical
  2013年新桥煤矿洗煤厂煤炭洗选过程中“水”消耗活动水平数据。

## Review details
Inventory: The internal review was done by several iteration steps concerning raw data validation, raw data documentation, representativity, completeness and consistency of modelling with regard to ISO 14040 and 14044.; Documentation: The review of the documentation was performed by Ecobilan and is in compliance with ISO 14040 and 14044. The data set documentation is correct in view of the appropriateness of the information provided. It includes all relevant information in view of data quality and scope of application of the respective LCI result.
