# 地下水异位修复;地下水抽出处理;施工;处理设施

Dataset: ILCD process, Unit process, single operation
Geography: CA
Reference year: 2007
Classification: Unit processes / Other Services / Repair and maintenance
Generated by: 王宁, wang_ning@caep.org.cn
Owner: 天工LCI数据工作小组
Review: Dependent internal review by 天工LCI数据工作小组
Amounts: no units in this file; such an amount is in the reference unit of its flow, which a separate flow dataset defines
copyright: false
licenseType: Free of charge for all users and uses

## General comment
使用活性炭、玻璃、乳胶建造废水处置设施

## Geography
The contaminated area was located 600 m from a river shore in the northern part of the prov-ince of Quebec， Canada.

## Technical purpose
所描述的工艺用于建造用于地下水异位修复的废水处置设施。这些设施采用活性炭、玻璃和乳胶等材料建造。这些设施对于治疗诸如加拿大魁北克省北部河岸600米处的地点提取的受污染地下水至关重要。此技术对于需要因环境污染而修复的区域而言十分重要。

## Reference product
- Treatment facilities: 1; estimated
  在现场建造一套废水处理装置

## Inputs
- Activated Carbon: 530700; estimated
  在现场建造废水处置装置所消耗的活性炭颗粒
- Latex: 52.8; estimated
  在现场建造废水处置装置所消耗的乳胶
- Glass (formed & finished): 6264; estimated
  在现场建造废水处置装置所消耗的玻璃

## Use advice
在使用此数据集进行生命周期评估时，应特别考虑建造废水处置设施的站点的地理位置和特定环境条件。必须在库存分析中准确核算施工材料的输入和设施的输出。如果适用，还应关注回收过程的方法论处理以及设施经历的使用阶段行为建模。此外，用户应基于当地情境和环境法规评估技术适用性。

## Review details
清单： 内部审查通过几个迭代步骤完成，涉及原始数据验证、原始数据记录、代表性、完整性、与 ISO 14040 和 14044 有关的建模的一致性。

## Data sources
- Cadotte, M., Deschênes, L. & Samson, R. Selection of a remediation scenario for a diesel-contaminated site using LCA. Int J Life Cycle Assess 12, 239–251 (2007).
