# 南美白对虾养殖;南美白对虾成虾;工厂化养殖

Dataset: ILCD process, Unit process, black box
Geography: RZ-SD-CN
Classification: Materials production / Food and renewable raw materials
Functional unit: 1 ton of white shrimp
Generated by: 吴康妮, wukangni@xmu.stu.edu.cn
Owner: 天工LCI数据工作小组
Review: Dependent internal review by 天工LCI数据工作小组
Amounts: no units in this file; such an amount is in the reference unit of its flow, which a separate flow dataset defines
licenseType: Free of charge for all users and uses

## General comment
本文研究范围包括从养殖场基础设施建设、虾苗运输、成虾养殖、成虾运往市场、基础设施废弃处置五个阶段。其中饲料生产为成虾养殖阶段是一个环节，是利用鱼粉、大豆、花生、鱼油、面粉、矿物质与粘合剂等生产的配合饲料

## Geography
山东省日照市涛雒镇

## Technical purpose
本工艺流程中培养的南美白对虾（Penaeus vannamei），通常被用于海产品生产，培育至成年后的虾类用于食用并分发至各个市场。这种工厂化养殖方法旨在为满足食品产业中的消费需求而设计，能进行高容量、控制性的白虾生产。所使用的配合饲料包括鱼粉、大豆、花生、鱼油、面粉、矿物质和粘合剂等成分。

## Reference product
- Litopenaeus vannamei: 1000; article inperiodical

## Inputs
All rows: article inperiodical
- Cement: 42.354
- iron: 53
  属于基础设施建设阶段,使用年限20年，该数据为折合一个养殖周期的投入数据
- polyethylene low density foil(PE-LD): 14.6
  属于基础设施建设阶段,使用年限15年，该数据为折合一个养殖周期的投入数据
- transport in t*km: 207.064
  虾苗运输，方式：空运。原文数据为质量*距离=（0.09412t*2200km）
- water: 8.47059e6
  属于成虾养殖阶段
- Electricity: 60504.2
  属于成虾养殖阶段
- Diesel: 9.76
  属于成虾养殖阶段
- fish meal: 411.765
- Soybean: 288.236
- Peanut: 222.353
- Fish Oil: 24.7059
- Flour: 378.824
- Mineral: 49.4118
- Adhesives: 5.7647
- Hydrogen peroxide: 141.18
- Fertilizer paste for aquaculture: 117.65
- Multivitamins: 0.94
- Immunopolysaccharide: 2.35

## Outputs
All rows: article inperiodical
- waste water - untreated: 8.47059e6
- phosphate: 0.091788
- Ammonia (NH4+, NH3, as N): 0.17099
- nitrite: 0.05497
- Chemical Oxygen Demand (COD): 13.2178

## Sampling procedure
时间： 2019 年 6 月份、11 月份。地点：在山东省日照市涛雒镇固定观察点调研，养殖产业的投入产出数据绝大部分来源于对养殖厂以及饲料加工厂负责人的问卷调查，水质监测数据则取自于当地海洋与渔业研究所的固定监测点，成虾运输至市场数据取自于日照市水产品批发市场以及养殖场负责人的调研

## Use advice
在使用本数据集进行生命周期评估时，应包括提及的所有阶段：养殖场基础设施建设、虾苗运输、虾养殖、市场运输及基础设施废弃处置。应特别注意来自养殖厂和饲料加工厂的输入输出数据的代表性，以及当地水质监测数据。确保数据收集的时间和地点与评估的系统相关，并通过考虑2019年6月和11月的数据来考虑季节差异。如果建模到市场的运输，使用提供的来自日照市水产品批发市场和养殖场调研的运输数据。

## Review details
清单： 内部审查通过几个迭代步骤完成，涉及原始数据验证、原始数据记录、代表性、完整性、与 ISO 14040 和 14044 有关的建模的一致性。

## Data sources
- 马一鸣. 基于生命周期评价方法的南美白对虾养殖产业链碳排放研究. (上海海洋大学, 2021).
