# 太阳能电池片制造 | 半导体工艺

Dataset: ILCD process, Unit process, single operation
Geography: SC-CN
Reference year: 2013
Classification: Materials production / Other mineralic materials
Functional unit: 1 kg solar grade multi-Si
LCI method principle: Attributional
LCI method approaches: Allocation
Generated by: 杨锦锋, yjfzfshn@163.com
Review: Dependent internal review by Tiangong LCI Data Working Group
Amounts: no units in this file; such an amount is in the reference unit of its flow, which a separate flow dataset defines
copyright: false

## General comment
多晶硅

## Geography
四川某太阳能电池片生产企业

## Time period
文章发表

## Technology and included processes
半导体工艺

## Reference product
- Multi-Si solar cell: 1e6; measured
  太阳能电池片（MW）

## Inputs
All rows: measured
- Multi-Si wafer: 3420
  多晶硅片
- electricity: 55548
  电耗
- Water (fresh water): 1.23654e6
  新鲜水
- Silver Paste: 60
  银浆
- Aluminum Paste: 430
  铝浆
- Ammonia: 40
  氨气
- Silane: 10
  硅烷
- Phosphorus Oxychloride: 8
  POCl3
- Sodium hydroxide: 195
  NaOH
- Hydrochloric acid: 450
  HCl
- Hydrofluoric acid: 860
  HF
- Nitrogen oxides: 1550
  硝酸
- oxygen: 113
  氧气

## Outputs
All rows: measured
- chlorine: 81.23
  氯气
- Nitrogen oxides: 26.78
  氮氧化物
- ammonia: 31.04
  氨气
- non-methane volatile organic compounds: 33.4
  TVOC
- hydrogen chloride: 7.29
  HCl
- chloride: 15.89
  氯化物
- fluoride: 83.65
  氟化物
- nitrogen, total (excluding N2): 49.32
  TN
- chemical oxygen demand: 126.89
  COD
- industrial waste (unspecified): 283
  固体废弃物

## Deviations from the LCI method approaches
以太阳能级多晶硅为研究对象，运用 LCA的评价方法，定量计算国内普遍生产水平下，太阳能级多晶硅生命周期过程的资源、能源投入和环境排放值

## Data selection and combination
根据四川某太阳能电池片生产企业生产过程的数据资料收集整理

## Review details
Inventory: The internal review was done by several iteration steps concerning raw data validation, raw data documentation, representativity, completeness and consistency of modelling with regard to ISO 14040 and 14044.; Documentation: The review of the documentation was performed by Ecobilan and is in compliance with ISO 14040 and 14044. The data set documentation is correct in view of the appropriateness of the information provided. It includes all relevant information in view of data quality and scope of application of the respective LCI result.

## Data sources
- 何洋. 太阳能级多晶硅的生命周期评价. (西南交通大学, 2013).
