# 玻璃生产 ;钢化玻璃;钢化处理

Dataset: ILCD process, Unit process, single operation
Geography: KM-YN-CN
Reference year: 2015
Valid until: 2023
Classification: Materials production / Glass and ceramics
Generated by: 和夏夏, 18616148319@163.com
Owner: 天工LCI数据工作小组
Review: Dependent internal review by 天工LCI数据工作小组
Amounts: no units in this file; such an amount is in the reference unit of its flow, which a separate flow dataset defines
copyright: false
licenseType: Free of charge for all users and uses

## Reference product
- Glass (formed & finished): 250000; measured
  钢化玻璃

## Inputs
- electricity mix: 518130; measured
- Glass (formed & finished): 303000; measured

## Outputs
- Glass (formed & finished): 50000; measured
  中空玻璃
- cullet float glass: 3201.5; measured

## Review details
清单： 内部审查通过几个迭代步骤完成，涉及原始数据验证、原始数据记录、代表性、完整性、与 ISO 14040 和 14044 有关的建模的一致性。

## Data sources
- 建设项目环境影响报告表（国环评证乙字 第 2501 号）
