# 湿蒸法棉布染整加工|印染棉布|翻缝

Dataset: ILCD process, Unit process, single operation
Geography: SZ-JS-CN
Reference year: 2012
Classification: Materials production / Other mineralic materials
Generated by: 段颖凡, 1300925579@qq.com
Review: Dependent internal review by 天工LCI数据工作小组
Amounts: no units in this file; such an amount is in the reference unit of its flow, which a separate flow dataset defines
copyright: false

## Geography
本研究选取江苏省某印染企业为重点调研对象，该企业位于长三角经济圈中的常熟。

## Inputs
- Cotton: 167; measured
- Cotton: 0.118; measured
  棉线

## Outputs
- carbon dioxide: 11.4; measured
- carbon monoxide: 0.0263
- sulfur dioxide: 0.000358; measured
- methane: 0.000232; measured
- Nitrogen oxides: 0.116
- nitrous oxide: 0.000217; measured
- Dust (unspecified, from stack): 0.00483; measured
- ammonia: 8.35e-5
- non-methane volatile organic compounds: 0.00942

## Review details
清单： 内部审查通过几个迭代步骤完成，涉及原始数据验证、原始数据记录、代表性、完整性、与 ISO 14040 和 14044 有关的建模的一致性。

## Data sources
- 朱亚楠. 棉布连续轧染工艺生命周期环境影响评价. (南京大学, 2012).
