# 工业硅生产 | 碳质还原法

Dataset: ILCD process, Unit process, single operation
Geography: CN
Reference year: 2014
Classification: Materials production / Other mineralic materials
Functional unit: The functional unit selected for this paper is a 1 kWp
LCI method principle: Attributional
LCI method approaches: Allocation
Generated by: 杨锦锋, yjfzfshn@163.com
Review: Dependent internal review by Tiangong LCI Data Working Group
Amounts: no units in this file; such an amount is in the reference unit of its flow, which a separate flow dataset defines
copyright: false

## General comment
多晶硅

## Geography
对中国生产的单晶硅和多晶硅光伏系统进行生命周期评价

## Time period
文章发表

## Technology and included processes
将炭、煤或木屑等还原剂在2000 ℃下与硅砂在电弧炉内反应

## Reference product
- Metallurgical silicon: 1; article inperiodical
  工业硅

## Inputs
All rows: article inperiodical
- silicon,silicon: 2.7
  硅石
- Charcoal: 0.745
  木炭
- Petroleum Coke: 0.68
  石油焦
- Graphite Electrode: 0.135
  石墨电极
- Water (fresh water): 180
  水
- electricity: 45
  电耗

## Outputs
All rows: article inperiodical
- carbon dioxide: 15.5
  CO2
- carbon monoxide: 3.84
  一氧化碳
- methane: 0.06
  甲烷
- nitrogen dioxide: 0.08
  氮氧化物
- sulfur dioxide: 0.259
  二氧化硫
- Dust (unspecified, from stack): 0.2
  粉尘
- Biochemical Oxygen Demand: 0.01
  生物需氧量
- chemical oxygen demand: 0.01
  化学需氧量
- dissolved organic carbon: 0.004
  DOC
- total organic carbon: 0.004
  TOC

## Deviations from the LCI method approaches
本文的研究目的是对中国生产的单晶硅和多晶硅光伏系统进行生命周期评价，分析废弃处理的方法和不同废弃处理方法对环境的影响

## Data selection and combination
班辉和叶宏亮分析了国内 5 个工业硅制造厂的数据，本文参考其物质输入，选取硅石、木炭、石油焦、石墨电极、水和电能,根据化学方程式计算过程排放物

## Review details
Inventory: The internal review was done by several iteration steps concerning raw data validation, raw data documentation, representativity, completeness and consistency of modelling with regard to ISO 14040 and 14044.; Documentation: The review of the documentation was performed by Ecobilan and is in compliance with ISO 14040 and 14044. The data set documentation is correct in view of the appropriateness of the information provided. It includes all relevant information in view of data quality and scope of application of the respective LCI result.

## Data sources
- 李鹞 & 于随然. 中国光伏系统的生命周期评价. 环境工程 32, 119–124 (2014).
