# 废塑料化学回收，制油

Dataset: ILCD process, Unit process, single operation
Geography: CN
Reference year: 2013
Classification: End-of-life treatment / Energy recycling
Functional unit: Dispose of 1 ton of waste plastic
Generated by: 陆嘉麒, wilsherelu@foxmail.com
Owner: 天工LCI数据工作小组
Review: Dependent internal review by 天工LCI数据工作小组
Amounts: no units in this file; such an amount is in the reference unit of its flow, which a separate flow dataset defines
copyright: false
licenseType: Free of charge for all users and uses

## Reference product
- packaging waste (plastic): 1000; input; measured

## Inputs
- Electricity: 2052; measured
  电
- Water for industrial use: 0.14; measured
  水
- natural gas: 50; measured
  液化气

## Outputs
All rows: measured
- light fuel oil: 260.5
  轻油
- heavy fuel oil: 547.05
  重油
- Paraffin: 60.7833
  石蜡
- carbon: 58.2333
  炭黑
- carbon dioxide (fossil): 249.74
  天然气燃烧排放
- nitrogen dioxide: 0.32
  天然气燃烧排放
- methane (fossil): 0.0216674
  天然气燃烧排放
- sulfur dioxide: 0.101949
  天然气燃烧排放
- carbon monoxide: 0.0860491
  天然气燃烧排放

## Review details
清单： 内部审查通过几个迭代步骤完成，涉及原始数据验证、原始数据记录、代表性、完整性、与 ISO 14040 和 14044 有关的建模的一致性。

## Data sources
- 生活垃圾中废塑料资源化（油化）中试研究总结报告，上海耀森环保科技有限公司
