# 石膏粉生产;石膏粉产品;破碎筛分法

Dataset: ILCD process
Geography: CN
Classification: Unit processes / Materials production / Other mineralic materials
Generated by: 陆嘉麒, wilsherelu@foxmail.com
Owner: 天工LCI数据工作小组
Review: Dependent internal review by 天工LCI数据工作小组
Amounts: no units in this file; such an amount is in the reference unit of its flow, which a separate flow dataset defines
copyright: false
licenseType: Free of charge for all users and uses

## General comment
通过这个工业过程产生的石膏粉主要用于建筑行业，作为生产石膏板、灰泥及其他建筑材料的原料。它也可以用作土壤改良剂来改善土壤结构，以及用作水泥的凝固延迟剂。

## Reference product
- Gypsum Powder: 1000; missing unimportant
  石膏粉产品

## Inputs
All rows: missing unimportant
- Limestone: 400
  石灰石
- gypsum: 880
  天然石膏
- Cellulose: 8
  纤维素
- water: 110
- Electricity: 180.36
- process steam: 720
  蒸汽

## Outputs
- nitrous oxide: 1700; missing unimportant
  氮氧化物[排放到大气（未指定类型）]
- sulfur dioxide: 20870; missing unimportant
  二氧化硫[排放到大气（未指定类型）]
- Particles (PM0.2 - PM2.5): 25330; missing unimportant
  总颗粒物[排放到大气（未指定类型）]

## Use advice
在使用此数据集进行生命周期评估（LCA）时，确保您包括来自原材料提取（例如，石膏开采）、生产过程以及与生产相关的任何运输的影响。除非您的评估范围特别包括下游处理，否则排除任何生命周期末期的回收或处理。注意地理相关性，因为数据代表了中国的生产环境，并且如果适用于不同地区，调整技术变化。

## Review details
清单： 内部审查通过几个迭代步骤完成，涉及原始数据验证、原始数据记录、代表性、完整性、与 ISO 14040 和 14044 有关的建模的一致性。

## Data sources
- 永平县石膏粉厂年产 150000 吨双飞粉生产线技改扩建项目环评报告公示
