# PVC木塑板生产;PVC 木塑板;原料外购搅拌-挤出成型-冷却-印刷-牵引-切割-成品

Dataset: ILCD process
Geography: CN
Classification: Unit processes / Materials production / Plastics
Generated by: 陆嘉麒, wilsherelu@foxmail.com
Owner: 天工LCI数据工作小组
Review: Dependent internal review by 天工LCI数据工作小组
Amounts: no units in this file; such an amount is in the reference unit of its flow, which a separate flow dataset defines
copyright: false
licenseType: Free of charge for all users and uses

## General comment
PVC木塑板生产描述的是一种生产过程，用于创建由热塑性塑料、木粉或纤维以及添加剂组成的复合材料。这些板材通常用于露台地板、栏杆、围栏、景观木材、壁板和侧边、公园长椅、造型和修边、窗户和门框以及室内家具。

## Reference product
- PVC Wood Plastic Composite: 1000; missing unimportant
  PVC 木塑板产品

## Inputs
All rows: missing unimportant
- Bis(2-ethylhexyl) terephthalate: 5.2
  对苯二甲酸二辛酯
- Antioxidant: 0.26
  抗氧化剂
- Magnesium Aluminide: 3.4
  镁铝化合物
- Wood: 102.57
  木粉
- calcium carbonate: 359.3
  碳酸钙
- Zinc stearate: 21.58
  硬脂酸锌
- polyvinylchloride resin (E-PVC): 506.86
  PVC树脂
- stearoyl benzoyl methane: 0.52
  β— 二酮
- Electricity: 873.684
  电耗
- water: 399.21
  水耗

## Outputs
All rows: missing unimportant
- Nitrogenous Matter (unspecified, as N): 0.00526
  氨氮[排放到水体（未指定类型）
- 1,2-dichloroethane: 0.000535
  二氯乙烯[排放到大气（未指定类型）]
- chemical oxygen demand: 0.05
  化学需氧量[排放到水体（未指定类型）]
- hydrogen chloride: 0.009
  氯化氢[排放到大气（未指定类型）]
- Particles (PM0.2 - PM2.5): 0.12
  总颗粒物[排放到大气（未指定类型）]
- phosphorus, total: 0.0006
  总磷[排放到水体（未指定类型）]

## Use advice
使用此数据集的用户在进行评估时应考虑PVC木塑板生命周期的特定阶段。这包括原材料获取、生产、运输、使用和终生处理。应特别注意材料的可回收性以及产品中使用的添加剂对环境的影响。准确评估产品影响的关键是应用能源消耗和原材料采购的区域数据。

## Review details
清单： 内部审查通过几个迭代步骤完成，涉及原始数据验证、原始数据记录、代表性、完整性、与 ISO 14040 和 14044 有关的建模的一致性。

## Data sources
- 年生产PVC木塑板线条1000吨项目环评报告公示
