# 玄武岩连续纤维生产;玄武岩连续纤维;高温熔化-拉丝成型

Dataset: ILCD process
Geography: CN
Classification: Unit processes / Materials production / Other mineralic materials
Generated by: 陆嘉麒, wilsherelu@foxmail.com
Owner: 天工LCI数据工作小组
Review: Dependent internal review by 天工LCI数据工作小组
Amounts: no units in this file; such an amount is in the reference unit of its flow, which a separate flow dataset defines
copyright: false
licenseType: Free of charge for all users and uses

## General comment
玄武岩连续纤维生产工艺旨在制造可用于建筑、汽车、航空航天和海洋工业的高性能材料。这些纤维具有优异的机械性能、热稳定性和化学稳定性，适合用于增强复合材料。

## Reference product
- Basalt Fiber: 1000; missing unimportant
  玄武岩连续纤维产品

## Inputs
All rows: missing unimportant
- basalt: 1060
  玄武岩矿石
- water: 7.65e7
  自来水
- Electricity: 1969.52
  电耗
- natural gas,natural gas: 497.8
  天然气
- cartonboard boxes; mixed technology; production mix, a plant, 46% primary fibre, 54% recovered fibre: 0.00989
  纸箱（包装）

## Outputs
All rows: missing unimportant
- Nitrogenous Matter (unspecified, as N): 0.17
  氨氮[排放到水体（未指定类型）
- nitrous oxide: 0.76
  氮氧化物[排放到大气（未指定类型）]
- sulfur dioxide: 0.27
  二氧化硫[排放到大气（未指定类型）]
- chemical oxygen demand: 5.77
  化学需氧量[排放到水体（未指定类型）]
- Particles (PM0.2 - PM2.5): 0.26
  总颗粒物[排放到大气（未指定类型）
- volatile organic compound: 0.13
  挥发性有机化合物[排放到大气（未指定类型）]
- Sludge (from processing): 3.11

## Use advice
在使用此数据集进行生命周期评估时，用户应确保包括玄武岩纤维的所有相关生命周期阶段，从原材料提取到生命周期终点的情景。应注意与生产过程相关的能耗和排放。应考虑地域范围，因为数据具体到中国的生产条件。为了全面评估，还应包括下游加工、使用阶段的影响以及生命周期终点的处理，如回收或填埋。

## Review details
清单： 内部审查通过几个迭代步骤完成，涉及原始数据验证、原始数据记录、代表性、完整性、与 ISO 14040 和 14044 有关的建模的一致性。

## Data sources
- 玄武岩连续纤维生产项目环评报告公示
