# 花岗岩板生产;花岗岩板材;切割、打磨和成型

Dataset: ILCD process
Geography: CN
Classification: Unit processes / Materials production / Other mineralic materials
Generated by: 陆嘉麒, wilsherelu@foxmail.com
Owner: 天工LCI数据工作小组
Review: Dependent internal review by 天工LCI数据工作小组
Amounts: no units in this file; such an amount is in the reference unit of its flow, which a separate flow dataset defines
copyright: false
licenseType: Free of charge for all users and uses

## General comment
指定尺寸（1.8*0.6*0.2米）的花岗岩板通常用于建筑目的，包括住宅和商业建筑内外的地板、台面以及装饰墙面和表面。

## Reference product
- Granite slab product: 1; missing unimportant
  花岗岩板材产品

## Inputs
- granite: 3543.75; missing unimportant
  花岗岩毛坯
- water: 4984.46; missing unimportant
- Electricity: 1.5984e6; missing unimportant

## Outputs
- Nitrogenous Matter (unspecified, as N): 2.15; missing unimportant
  氨氮[排放到水体（未指定类型）
- chemical oxygen demand: 20; missing unimportant
  化学需氧量[排放到水体（未指定类型）]
- Particles (PM0.2 - PM2.5): 940; missing unimportant
  总颗粒物[排放到大气（未指定类型）]
- Sludge (from processing): 576880; missing unimportant

## Use advice
使用这份花岗岩板生产生命周期评估数据时，必须考虑地理位置因素，因为提供的数据是针对中国（CN）的。此外，用户应注意生产实践的变化，并应了解数据是包括还是排除了材料的生命周期终端场景，例如回收或处置。

## Review details
清单： 内部审查通过几个迭代步骤完成，涉及原始数据验证、原始数据记录、代表性、完整性、与 ISO 14040 和 14044 有关的建模的一致性。

## Data sources
- 年加工30万m2花岗岩板材项目环评报告
