# 湿法制砂|粗、中砂洗砂|水洗

Dataset: ILCD process, Unit process, single operation
Geography: CS-HUN-CN
Reference year: 2020
Classification: Materials production / Other mineralic materials
Generated by: 崔航, Cuihang0716@163.com
Review: Dependent internal review by Tiangong LCI Data Working Group
Amounts: no units in this file; such an amount is in the reference unit of its flow, which a separate flow dataset defines
copyright: false

## General comment
随着制砂废水漏出的粒径小于4mm的砂经洗砂机和细砂回收机制得2~3cm的中砂后，由脱水筛进行水砂分离后，通过输送带运至成品堆场

## Reference product
- sand: 133333; measured
  沙子量

## Inputs
All rows: measured
- Water (fresh water): 85
- electricity mix: 216
  洗砂机用电量
- electricity mix: 158.4
  脱水筛用电量
- electricity mix: 108
  洗石机用电量
- sand: 133333
  沙子量

## Outputs
- water: 65.49; measured

## Review details
Inventory: The internal review was done by several iteration steps concerning raw data validation, raw data documentation, representativity, completeness and consistency of modelling with regard to ISO 14040 and 14044.; Documentation: The review of the documentation was performed by Ecobilan and is in compliance with ISO 14040 and 14044. The data set documentation is correct in view of the appropriateness of the information provided. It includes all relevant information in view of data quality and scope of application of the respective LCI result.

## Data sources
- 年产 60 万吨机制砂建设项目环评报告
