# 腻子粉生产;腻子粉;搅拌

Dataset: ILCD process
Geography: CN
Classification: Unit processes / Materials production / Other mineralic materials
Generated by: 陆嘉麒, wilsherelu@foxmail.com
Owner: 天工LCI数据工作小组
Review: Dependent internal review by 天工LCI数据工作小组
Amounts: no units in this file; such an amount is in the reference unit of its flow, which a separate flow dataset defines
copyright: false
licenseType: Free of charge for all users and uses

## General comment
该数据集代表了腻子粉的生产，腻子粉通常用作墙面修饰材料，以创建用于油漆或装饰的平滑表面。它也可用于小面积的表面修复，并且适用于建筑和翻新行业。

## Reference product
- Putty Powder: 1000; missing unimportant
  腻子粉产品

## Inputs
All rows: missing unimportant
- White Portland cement: 100
  白色硅酸盐水泥
- Calcium Powder: 440
  钙粉
- Caulk Compound: 50
  胶粉
- cement, ordinary portland cement: 270
  普通硅酸盐水泥
- sand: 220
  沙子
- crushed stone 16/32: 500
  石粉
- gypsum: 160
  石膏
- Shuangfei Powder: 600
  双飞粉
- cement, unspecified: 160
  水泥
- Calcium carbonate (> 63 microns): 200
  重钙粉
- Electricity: 122.616
- water: 320

## Outputs
- Particles (PM0.2 - PM2.5): 70; missing unimportant
  总颗粒物[排放到大气（未指定类型）]
- phosphorus, total: 1.75; missing unimportant
  总磷[排放到水体（未指定类型）]
- non-methane volatile organic compounds: 3240; missing unimportant
  non-methane volatile organic compounds[排放到大气（未指定类型）]

## Use advice
在使用此数据集进行生命周期评估时，用户应考虑腻子粉的具体应用场景。重要的是要包括上游过程，例如原材料的提取和加工，以及生产过程中的能耗。如果适用，还应解决材料的终生处理和潜在的回收问题。应用阶段的环境影响通常较低，但如果腻子粉不是水性的，则根据使用的溶剂可能会考虑环境影响。

## Review details
清单： 内部审查通过几个迭代步骤完成，涉及原始数据验证、原始数据记录、代表性、完整性、与 ISO 14040 和 14044 有关的建模的一致性。

## Data sources
- 年产5000吨腻子粉环评报告表
